# Ищем объём детали
# Объём 1-го кольца
d_0 := 47  # мм
d_1 := 82  # мм
h := 6  # мм
V_1 := π*(d_1^2 - d_0^2)/4*h = 21276.4  # мм^3
# Объём 2-го кольца
d_0 := 47  # мм
d_1 := 56  # мм
h := 34  # мм
V_2 := π*(d_1^2 - d_0^2)/4*h = 24754.2  # мм^3
# Объём 3-го кольца
d_0 := 42  # мм
d_1 := 47  # мм
h := 6  # мм
V_3 := π*(d_1^2 - d_0^2)/4*h = 2097.01  # мм^3
# Объём сегмента круга
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R := 82/2 = 41  # мм
α := 62° + (47/60)° = 1.09578
h := 6  # мм
S := R^2/2*(α - sin(α)) = 173.557  # мм^2
V_сег := S*h = 1041.34  # мм^3
# Объём четырёх отверстий
d := 10  # мм
h := 6  # мм
V_o := 4*π*d^2/4*h = 1884.96  # мм^3
# Окончательный объём детали
V_д := V_1 + V_2 + V_3 - V_o - V_сег = 45201.3  # мм^3
V_сег/V_д*100 = 2.30379
# Объём простого тела (цилиндра), в которое вписывается деталь.
d := 82  # мм
h := 40  # мм
V_пт := π*d^2/4*h = 211241  # мм
V_д/V_пт*100 = 21.398  # %
# Объём Полости 1:
d_0 := 42  # мм
d_1 := 47  # мм
h := 20  # мм
V_п1 := π/4*(d_1^2 - d_0^2)*h = 6990.04  # мм^3
V_п1/V_д*100 = 15.4642  # %
# Объём Полости 2:
d_0 := 42  # мм
d_1 := 47  # мм
h := 14  # мм
V_п2 := π/4*(d_1^2 - d_0^2)*h = 4893.03  # мм^3
V_п2/V_д*100 = 10.825  # %
# Объём центрального отверстия(Отверстие 1):
d := 42  # мм
h := 40  # мм
V_о1 := π*d^2/4*h = 55417.7  # мм^3
V_о1/V_д*100 = 122.602  # %
# Объём одного из отверстий на фланце (Отверстия 2):
d := 10  # мм
h := 6  # мм
V_о2 := π*d^2/4*h = 471.239  # мм^3
V_о2/V_д*100 = 1.04253  # %
# Объём внутренних фасок
d := 47
h := 1.6
R := d/2 + h
r := d/2
V_вф := 1/3*π*h*(R^2 + r^2 + R*r) - π*r^2*h = 193.288  # мм^3
V_вф/V_д*100 = 0.427615  # %
# Объём наружной фаски
d := 56
h := 1.6
R := d/2
r := d/2 - h
V_нф := π*R^2*h - 1/3*π*h*(R^2 + r^2 + R*r) = 220.9  # мм^3
V_нф/V_д*100 = 0.488703  # %
# Объём канавки
d_0 := 47  # мм
d_1 := d_0 + 0.5 = 47.5  # мм
h := 4  # мм
V_к := π*(d_1^2 - d_0^2)/4*h = 148.44  # мм^3
V_к/V_д*100 = 0.328398  # %
# Поковка
ρ := 7820  # кг/м^3
# Назначенеи поверхности разъёма
# Напуск если  вертикально
d_0 := 56  # мм
d_1 := 82  # мм
h := 34  # мм
V_верт := π/4*(d_1^2 - d_0^2)*h - S*h = 89911.4  # мм^3
m_верт := V_верт*(10^-3)^3*ρ = 0.703107  # кг
# Напуск если горизонтально
V_гор := V_о1 + V_п1 + V_п2 = 67300.8  # мм^3
m_гор := V_гор*(10^-3)^3*ρ = 0.526292  # кг
# Определения исходного индекса поковки
N := 2  # № группы по массе
M := 1  # № группы стали
C := 0.21  # степень сложности
C := 3
T := 4  # № класса точности
ИсхИнд := N + (M - 1) + (C - 1) + 2*(T - 1) = 10
# Проектирование облойной канавки и расчет необходимого усилия пресса
D_П := 86  # мм
# Принимается основной вид облойной канавки, для которого высота облоя в зоне мостика h_об := 0.015*D_П = 1.29, что для нашей поковки равно h_об := 1.3мм. Соответственно, длина мостика b_об := 4*h_об = 5.2мм. Величину объема облоя в зоне мостика можно рассчитать по формуле:
V_О := π/4*((D_П + 2*b_об)^2 - D_П^2)*h_об = 1936.83  # мм^3
# Усилие необходимое для получения поковки, оценивается по приведённой ниже формуле (при σ_Т := 48МПа для стали 25 – таб. 15ШП):
P := σ_Т*π*(D_П + 2*b_об)^2/4*(1 + (D_П + 2*b_об)/(8*h_об))*10^-6 = 3.59768  # МН
# 3.11 Расчет Квг, Квт и КИМ для штампованной детали «Стакан».
M_пок := 0.97  # кг
M_обл := 0.15*M_пок = 0.1455  # кг
M_уг := 0.02*M_пок = 0.0194  # кг
M_заг := M_пок + M_обл + M_уг = 1.1349  # кг
